// COMSOL Multiphysics 6.0.0.318 model "COMSOL-Condensers-Magnetic-Lenses.mph"
// SEM Condensers
// This simulation calculates the effects of the condenser magnetic lenses into the electron beam.
// Outline of the model tree

Parameters
  Ic = 1892[mA]  // Coil current
  Nc = 485  // Number of turns in coil
  Ic2 = 2214[mA]
  E0 = 30000[eV]
  V0 = sqrt(2*E0/me_const)

Geometry
  geom1 "Geometry 1" (3D, length unit mm)
    imp1: Import | type = cad; filename = /Volumes/Projects/SEM-Mechanical/Condensers.igs; unit = source
    cyl1: Cylinder "Electron Source" | pos = {0, -10, 0}; axistype = y; h = 0.5
    cyl2: Cylinder "Vacuum" | pos = {0, -10, 0}; axistype = y; r = 40; h = 250
    wp1: WorkPlane | unite = on
    fin: Finalize "Form Union"
  pgeom_cpt "Geometry" (1D, length unit m)
    pt1: Point

Materials
  mat2: Common "Perfect vacuum" on all domains
    def "Basic"
      density = 0
      relpermeability = 1
      relpermittivity = 1
      electricconductivity = 0
  mat3: Common "Iron" on domains 2-5
    def "Basic"
      relpermeability = 4000
      electricconductivity = 1.12e7[S/m]
      thermalexpansioncoefficient = 12.2e-6[1/K]
      heatcapacity = 440[J/(kg*K)]
      relpermittivity = 1
      density = 7870[kg/m^3]
      thermalconductivity = 76.2[W/(m*K)]
    Enu "Young's modulus and Poisson's ratio"
      E = 200e9[Pa]
      nu = 0.29
  mat1: Common "Copper" on domains 6, 10
    def "Basic"
      relpermeability = 1
      electricconductivity = 5.998e7[S/m]
      thermalexpansioncoefficient = 17e-6[1/K]
      heatcapacity = 385[J/(kg*K)]
      relpermittivity = 1
      density = 8960[kg/m^3]
      thermalconductivity = 400[W/(m*K)]
    Enu "Young's modulus and Poisson's ratio"
      E = 110e9[Pa]
      nu = 0.35
    linzRes "Linearized resistivity"
      rho0 = 1.72e-8[ohm*m]
      alpha = 0.0039[1/K]
      Tref = 298[K]
  mat4: Common "1020 [solid,annealed]" on domains 2-5
    def "Basic"
      thermalconductivity = k(T)
      resistivity = res(T)
      thermalexpansioncoefficient = (alpha(T)+(Tempref-293[K])*if(abs(T-Tempref)>1e-3,(alpha(T)-alpha(Tempref))/(T-Tempref),d(alpha(T),T)))/(1+alpha(Tempref)*(Tempref-293[K]))
      heatcapacity = C(T)
      electricconductivity = sigma(T)
      density = rho(T)
      TD = TD(T)
      relpermeability = 100
      relpermittivity = 1
      k: Piecewise
        arg = T
        pieces = 
          {26.0, 200.0, -5.435137+1.615324*T^1-0.01440223*T^2+6.259829E-5*T^3-1.325386E-7*T^4+1.087384E-10*T^5}
          {200.0, 1073.0, 61.1315+0.05272897*T^1-2.040655E-4*T^2+2.105727E-7*T^3-8.423301E-11*T^4}
        argunit = K
        fununit = W/(m*K)
      res: Piecewise
        arg = T
        pieces = 
          {293.0, 1073.0, 9.391673E-8+7.568236E-12*T^1+8.641318E-13*T^2}
          {1073.0, 1573.0, -3.625E-7+2.652646E-9*T^1-1.562286E-12*T^2+3.333333E-16*T^3}
        argunit = K
        fununit = ohm*m
      alpha: Piecewise
        arg = T
        pieces = 
          {0.0, 680.0, 6.731035E-6+3.918624E-8*T^1-1.534406E-10*T^2+3.517965E-13*T^3-3.827522E-16*T^4+1.565546E-19*T^5}
          {680.0, 977.0, 8.614185E-6+1.013631E-8*T^1-2.26181E-12*T^2-1.569696E-15*T^3}
          {977.0, 1061.0, 6.292031E-5-4.915637E-8*T^1}
          {1061.0, 1144.0, -1.563678E-6+1.162025E-8*T^1}
        argunit = K
        fununit = 1/K
      C: Piecewise | arg = T; pieces = {293.0, 848.0, -215.730638+6.0184999*T^1-0.0183429321*T^2+2.414973E-5*T^3-1.07882432E-8*T^4}; argunit = K; fununit = J/(kg*K)
      sigma: Piecewise
        arg = T
        pieces = 
          {293.0, 1073.0, 1/(8.641318E-13*T^2+7.568236E-12*T+9.391673E-08)}
          {1073.0, 1573.0, 1/(3.333333E-16*T^3-1.562286E-12*T^2+2.652646E-09*T-3.625E-07)}
        argunit = K
        fununit = S/m
      rho: Piecewise
        arg = T
        pieces = 
          {0.0, 60.0, 7907.978-0.01549395*T^1}
          {60.0, 977.0, 7911.3-0.01678428*T^1-8.018711E-4*T^2+1.172796E-6*T^3-1.015971E-9*T^4+3.677737E-13*T^5}
          {977.0, 1061.0, 7116.994+0.5195388*T^1}
          {1061.0, 1144.0, 8166.523-0.4696497*T^1}
        argunit = K
        fununit = kg/m^3
      TD: Piecewise
        arg = T
        pieces = 
          {295.0, 1048.0, 1.908565E-5-1.445398E-8*T^1}
          {1048.0, 1248.0, -6.844E-5+1.158517E-7*T^1-4.46478E-11*T^2}
        argunit = K
        fununit = m^2/s
    ThermalExpansion
      alphatan = CTE(T)
      dL = (dL(T)-dL(Tempref))/(1+dL(Tempref))
      dL: Piecewise
        arg = T
        pieces = 
          {0.0, 50.0, -0.002022973+3.918919E-7*T^1}
          {50.0, 212.0, -0.002063267-3.508062E-7*T^1+2.838477E-8*T^2}
          {212.0, 977.0, -0.00252395773+5.644256E-6*T^1+1.0799E-8*T^2-1.801872E-12*T^3-1.569701E-15*T^4}
          {977.0, 1061.0, 0.03264232-2.297313E-5*T^1}
          {1061.0, 1144.0, -0.01351301+2.053771E-5*T^1}
        argunit = K
      CTE: Piecewise | arg = T; pieces = {293.0, 1065.0, 5.044861E-6+2.5188E-8*T^1-1.418195E-11*T^2}; argunit = K; fununit = 1/K
    Enu "Young's modulus and Poisson's ratio"
      E = E(T)
      nu = nu(T)
      E: Piecewise
        arg = T
        pieces = 
          {4.0, 273.0, 2.217366E11+5020008.0*T^1-305140.4*T^2+926.6601*T^3-1.145454*T^4}
          {273.0, 1050.0, 2.109875E11+3.572844E7*T^1-106319.6*T^2}
          {1050.0, 1500.0, 2.024261E11-6.77381E7*T^1}
        argunit = K
        fununit = Pa
      nu: Piecewise
        arg = T
        pieces = 
          {4.0, 120.0, 0.2850355-1.662951E-6*T^1}
          {120.0, 273.0, 0.2848011-7.147353E-6*T^1+6.558945E-8*T^2}
          {273.0, 1053.0, 0.2712267+7.030261E-5*T^1-3.856929E-8*T^2+1.246582E-11*T^3}
          {1053.0, 1500.0, 0.3165268-1.242823E-6*T^1+1.661461E-9*T^2}
        argunit = K
    KG "Bulk modulus and shear modulus"
      K = kappa(T)
      G = mu(T)
      mu: Piecewise
        arg = T
        pieces = 
          {4.0, 273.0, 8.626526E10+1636497.0*T^1-108981.6*T^2+291.1261*T^3-0.3377859*T^4}
          {273.0, 1050.0, 8.301552E10+9184755.0*T^1-38834.5*T^2}
          {1050.0, 1500.0, 7.694034E10-2.580357E7*T^1}
        argunit = K
        fununit = Pa
      kappa: Piecewise
        arg = T
        pieces = 
          {4.0, 100.0, 1.800573E11-3478717.0*T^1+151512.1*T^2-5485.327*T^3+28.28329*T^4}
          {100.0, 273.0, 1.818111E11-4.023792E7*T^1+84204.68*T^2-93.09453*T^3}
          {273.0, 1500.0, 1.842649E11-2.509462E7*T^1-28588.37*T^2}
        argunit = K
        fununit = Pa

Physics
  mf: InductionCurrents "Magnetic Fields" on all domains
    dependent variable A = {Ax, Ay, Az}
    al1: AmperesLaw "Ampère's Law 1" (default)
    mi1: MagneticInsulation (default)
    init1: init "Initial Values 1" (default)
    coil1: Coil on domains 6
      ConductorModel = Multi
      CoilType = Circular
      ICoil = Ic
      N = Nc
      coilWindArea = 0.5[mm^2]
      materialType = nonSolid
      cre1: CoilReferenceEdge "Coil Geometry 1" on edges 159, 160
    coil2: Coil on domains 10
      ConductorModel = Multi
      CoilType = Circular
      ICoil = Ic2
      N = Nc
      coilWindArea = 0.5[mm^2]
      materialType = nonSolid
      cre1: CoilReferenceEdge "Coil Geometry 1" on edges 164, 165
  cpt: ChargedParticleTracing on all domains
    dependent variable q = {qx, qy, qz}
    MaximumSecondary.MaximumSecondary = 0
    RelativisticCorrection.RelativisticCorrection = 1
    wall1: Wall (default)
    pp1: ParticleProperties "Electron" | ParticleSpecies = Electron
    mf1: MagneticForce on all domains | B_src = root.comp1.mf.Bx
    inl1: Inlet on boundaries 140
      TimeDistributionFunction = Uniform
      InitialPosition = ProjectedPlaneGrid
      N = 1000
      v0 = {0, V0, 0}
    pmi1: ParticleMatterInteractions on domains 2-5 | Ec = 33000[eV]; ParticlesToAffect = SingleSpecies

Mesh
  mesh1 "Mesh 1" (physics-controlled)

Studies
  std1 "Study 1"
    stat: Stationary | solve for = {mf}
  std2 "Study 2"
    time: Transient "Time Dependent"
      tunit = ns
      tlist = range(0,0.204081632653,10)
      solve for = {cpt}
      usesol = on
      notsolmethod = sol
      notstudy = std1

Solver configurations
  sol1 "Solution 1" (study std1)
    v1: Variables "Dependent Variables 1"
    s1: Stationary "Stationary Solver 1"
      fc1: FullyCoupled | linsolver = i1
      i1: Iterative | linsolver = fgmres; nlinnormuse = on
        mg1: Multigrid
  sol2 "Solution 2" (study std2)
    v1: Variables "Dependent Variables 1"
    t1: Time "Time-Dependent Solver 1"
      tlist = range(0,0.204081632653,10)
      rtol = 1.0E-5
      timemethod = genalpha
      estrat = exclude
      tstepsgenalpha = strict
      rhoinf = 1
      fc1: FullyCoupled | linsolver = i1; ntolfact = 0.1
      i1: Iterative
        ja1: Jacobi

Datasets
  dset1: Solution | solution = sol1
  dset2: Solution | solution = sol2
  part1: Particle
    solution = sol2
    pgeomspec = fromphysics
    pgeom = pgeom_cpt
    posdof = {comp1.qx, comp1.qy, comp1.qz}
    physicsinterface = cpt
  cpl1: CutPlane | data = part1; quickplane = xy
  cpl2: CutPlane | data = part1; quickplane = xy
  cpl3: CutPlane | data = part1; quickplane = xz; quicky = 100

Plots
  pg1: PlotGroup3D "Magnetic Flux Density Norm (mf)" | data = dset1
    mslc1: Multislice
      expr = mf.normB
      multiplanexmethod = coord
      xcoord = mf.CPx
      multiplaneymethod = coord
      ycoord = mf.CPy
      multiplanezmethod = coord
      zcoord = 0
    strmsl1: StreamlineMultislice
      expr = {mf.Bx, mf.By, mf.Bz}
      multiplanexmethod = coord
      xcoord = mf.CPx
      multiplaneymethod = coord
      ycoord = mf.CPy
      multiplanezmethod = coord
      zcoord = 0
      udist = 0.02
      col1: Color "Color Expression 1" | expr = mf.normB
      filt1: Filter | expr = !isScalingSystemDomain
  pg2: PlotGroup3D "Particle Trajectories (cpt)" | data = part1
    traj1: ParticleTrajectories
      col1: Color "Color Expression 1" | expr = sqrt(cpt.Ftx^2+cpt.Fty^2+cpt.Ftz^2)
  pg4: PlotGroup2D "Poincaré Maps" | data = part1; title = Poincaré Map
    poma1: PoincareMap "Poincaré Map 1"
      data = cpl1
      sphereradiusscale = 0.449126456444
      truesphereradiusscale = 0.449126456444
      usefixedpointsize = on