// COMSOL Multiphysics 6.0.0.318 model "COMSOL-Objective-Magnetic-Lens.mph"
// Objective
// This simulation calculates the Magnetic flux density for the magnet designed for the sem objective and calculates the field and electron interaction.
// Outline of the model tree

Parameters
  Ic = 342[mA]  // Coil current
  Nc = 450  // Number of turns in coil
  Ic2 = 139[mA]
  E0 = 30000[eV]
  V0 = sqrt(2*E0/me_const)
  IObj = 1047[mA]
  NObj = 1400

Geometry
  geom1 "Geometry 1" (3D, length unit mm)
    imp2: Import "Objective" | type = cad; filename = /Volumes/Projects/SEM-Mechanical/Objective_Simulation.igs
    rot1: Rotate | input = imp2; rot = 180
    mov1: Move | input = rot1; displx = 0; disply = 130; displz = 0
    cyl1: Cylinder "Electron Source" | pos = {0, -5, 0}; axistype = y
    cyl2: Cylinder "Vacuum" | pos = {0, -10, 0}; axistype = y; r = 72; h = 200
    wp1: WorkPlane | unite = on
    fin: Finalize "Form Union"
  pgeom_cpt "Geometry" (1D, length unit m)
    pt1: Point

Materials
  mat2: Common "Perfect vacuum" on all domains
    def "Basic"
      density = 0
      relpermeability = 1
      relpermittivity = 1
      electricconductivity = 0
  mat3: Common "Iron" on domains 2-4, 6, 8, 11
    def "Basic"
      relpermeability = 100
      electricconductivity = 1.12e7[S/m]
      thermalexpansioncoefficient = 12.2e-6[1/K]
      heatcapacity = 440[J/(kg*K)]
      relpermittivity = 1
      density = 7870[kg/m^3]
      thermalconductivity = 76.2[W/(m*K)]
    Enu "Young's modulus and Poisson's ratio"
      E = 200e9[Pa]
      nu = 0.29
  mat1: Common "Copper" on domains 7
    def "Basic"
      relpermeability = 1
      electricconductivity = 5.998e7[S/m]
      thermalexpansioncoefficient = 17e-6[1/K]
      heatcapacity = 385[J/(kg*K)]
      relpermittivity = 1
      density = 8960[kg/m^3]
      thermalconductivity = 400[W/(m*K)]
    Enu "Young's modulus and Poisson's ratio"
      E = 110e9[Pa]
      nu = 0.35
    linzRes "Linearized resistivity"
      rho0 = 1.72e-8[ohm*m]
      alpha = 0.0039[1/K]
      Tref = 298[K]
  mat4: Common "Glass (quartz)" on domains 12
    def "Basic"
      relpermeability = 1
      electricconductivity = 1e-14[S/m]
      relpermittivity = 4.2
      density = 2210[kg/m^3]
      thermalconductivity = 1.4[W/(m*K)]
      heatcapacity = 730[J/(kg*K)]
    RefractiveIndex
      n = 1.5
      ki = 0

Physics
  mf: InductionCurrents "Magnetic Fields" on all domains
    dependent variable A = {Ax, Ay, Az}
    al1: AmperesLaw "Ampère's Law 1" (default)
    mi1: MagneticInsulation (default)
    init1: init "Initial Values 1" (default)
    coil3: Coil "Objective" on domains 7
      ConductorModel = Multi
      CoilType = Circular
      CoilName = Objective
      ICoil = IObj
      N = NObj
      coilWindArea = 1.65[mm^2]
      materialType = nonSolid
      cre1: CoilReferenceEdge "Coil Geometry 1" on edges 282, 283
  cpt: ChargedParticleTracing on all domains
    dependent variable q = {qx, qy, qz}
    MaximumSecondary.MaximumSecondary = 0
    RelativisticCorrection.RelativisticCorrection = 1
    wall1: Wall (default)
    pp1: ParticleProperties "Electron" | ParticleSpecies = Electron
    mf1: MagneticForce on all domains | B_src = root.comp1.mf.Bx
    inl1: Inlet on boundaries 226
      TimeDistributionFunction = Uniform
      InitialPosition = ProjectedPlaneGrid
      N = 1000
      v0 = {0, V0, 0}
    pmi1: ParticleMatterInteractions on domains 2, 6, 12 | Ec = 350000[eV]; ParticlesToAffect = SingleSpecies

Mesh
  mesh1 "Mesh 1" (physics-controlled)
    size: MeshSizeDefault | hauto = 3

Studies
  std1 "Study 1"
    stat: Stationary | solve for = {mf}
  std2 "Study 2"
    time: Transient "Time Dependent"
      tunit = ns
      tlist = range(0,0.416666666667,10)
      solve for = {cpt}
      usesol = on
      notsolmethod = sol
      notstudy = std1

Solver configurations
  sol1 "Solution 1" (study std1)
    v1: Variables "Dependent Variables 1"
    s1: Stationary "Stationary Solver 1"
      fc1: FullyCoupled | linsolver = i1
      i1: Iterative | linsolver = fgmres; nlinnormuse = on
        mg1: Multigrid
  sol2 "Solution 2" (study std2)
    v1: Variables "Dependent Variables 1"
    t1: Time "Time-Dependent Solver 1"
      tlist = range(0,0.416666666667,10)
      rtol = 1.0E-5
      timemethod = genalpha
      estrat = exclude
      tstepsgenalpha = strict
      rhoinf = 1
      fc1: FullyCoupled | linsolver = i1; ntolfact = 0.1
      i1: Iterative
        ja1: Jacobi

Datasets
  dset1: Solution | solution = sol1
  dset2: Solution | solution = sol2
  part1: Particle
    solution = sol2
    pgeomspec = fromphysics
    pgeom = pgeom_cpt
    posdof = {comp1.qx, comp1.qy, comp1.qz}
    physicsinterface = cpt
  cpl1: CutPlane | data = part1; quickplane = xy
  cpl2: CutPlane | data = part1; quickplane = xy
  cpl3: CutPlane | data = part1; quickplane = xz; quicky = 130+28

Plots
  pg1: PlotGroup3D "Magnetic Flux Density Norm (mf)" | data = dset1
    mslc1: Multislice
      expr = mf.normB
      multiplanexmethod = coord
      xcoord = mf.CPx
      multiplaneymethod = coord
      ycoord = mf.CPy
      multiplanezmethod = coord
      zcoord = 0
    strmsl1: StreamlineMultislice
      expr = {mf.Bx, mf.By, mf.Bz}
      multiplanexmethod = coord
      xcoord = mf.CPx
      multiplaneymethod = coord
      ycoord = mf.CPy
      multiplanezmethod = coord
      zcoord = 0
      udist = 0.02
      col1: Color "Color Expression 1" | expr = mf.normB
      filt1: Filter | expr = !isScalingSystemDomain
  pg2: PlotGroup3D "Particle Trajectories (cpt)" | data = part1
    traj1: ParticleTrajectories
      col1: Color "Color Expression 1" | expr = sqrt(cpt.Ftx^2+cpt.Fty^2+cpt.Ftz^2)
  pg4: PlotGroup2D "Poincaré Maps" | data = part1; title = Poincaré Map
    poma1: PoincareMap "Poincaré Map 1"
      data = cpl3
      sphereradiusscale = 0.632139541241
      truesphereradiusscale = 0.632139541241
      usefixedpointsize = on